A24 := [-108, 0.7, 0.6; 0, 0.1, 0; 0, -0.3, 0.2]
B24 := [0; -1; 0]
x24 := lsolve(A24, B24)
x24 = [-0.148148; -10; -15]
A13 := [-108, 0.7, 0.5; 0, 0.1, 0; 0, -0.3, 0.2]
A21 := [-108, 0.7, 0.6; 0.1, 0.1, 0; 0, -0.3, 0.2]
A22 := [-108, 0.7, 0.6; 0, 0.2, 0; 0, -0.3, 0.2]
A23 := [-108, 0.7, 0.6; 0, 0.1, -0.1; 0, -0.3, 0.2]
A11 := [-108.1, 0.7, 0.6; 0, 0.1, 0; 0, -0.3, 0.2]
A12 := [-108, 0.8, 0.6; 0, 0.1, 0; 0, -0.3, 0.2]
x13 := lsolve(A13, B24) = [-0.134259; -10; -15]
x21 := lsolve(A21, B24) = [-0.145985; -9.85401; -14.781]
x22 := lsolve(A22, B24) = [-0.0740741; -5; -7.5]
x23 := lsolve(A23, B24) = [0.296296; 20; 30]
x11 := lsolve(A11, B24) = [-0.148011; -10; -15]
x12 := lsolve(A12, B24) = [-0.157407; -10; -15]
dx11 := x11 - x24 = [0.000137047; 0; 0]
dx13 := x13 - x24 = [0.0138889; 0; 0]
dx21 := x21 - x24 = [0.00216275; 0.145985; 0.218978]
dx22 := x22 - x24 = [0.0740741; 5; 7.5]
dx23 := x23 - x24 = [0.444444; 30; 45]
dx12 := x12 - x24 = [-0.00925926; 0; 0]
mB := |B24| = 1
A33 := [-108, 0.7, 0.6; 0, 0.1, 0; 0, -0.3, 0.3]
A31 := [-108, 0.7, 0.6; 0, 0.1, 0; 0.1, -0.3, 0.2]
A32 := [-108, 0.7, 0.6; 0, 0.1, 0; 0, -0.4, 0.2]
B12 := [0; 0.9; 0]
B13 := [0; 1; -0.1]
B11 := [0.1; 1; 0]
x33 := lsolve(A33, B24) = [-0.12037; -10; -10]
x31 := lsolve(A31, B24) = [-0.147738; -10; -14.9261]
x32 := lsolve(A32, B24) = [-0.175926; -10; -20]
xB11 := lsolve(A24, B11) = [0.147222; 10; 15]
xB12 := lsolve(A24, B12) = [0.133333; 9; 13.5]
xB13 := lsolve(A24, B13) = [0.14537; 10; 14.5]
dx33 := x33 - x24 = [0.0277778; 0; 5]
dx31 := x31 - x24 = [0.000410383; 0; 0.0738689]
dx32 := x32 - x24 = [-0.0277778; 0; -5]
dxB11 := xB11 - x24 = [0.29537; 20; 30]
dxB12 := xB12 - x24 = [0.281481; 19; 28.5]
dxB13 := xB13 - x24 = [0.293519; 20; 29.5]
m11 := max(vectorize(|dx11|)) = 0.000137047
m21 := max(vectorize(|dx21|)) = 0.218978
m31 := max(vectorize(|dx31|)) = 0.0738689
mB11 := max(vectorize(|dxB11|)) = 30
m12 := max(vectorize(|dx12|)) = 0.00925926
m22 := max(vectorize(|dx22|)) = 7.5
m32 := max(vectorize(|dx32|)) = 5
mB12 := max(vectorize(|dxB12|)) = 28.5
m13 := max(vectorize(|dx13|)) = 0.0138889
m23 := max(vectorize(|dx23|)) = 45
m33 := max(vectorize(|dx33|)) = 5
mB13 := max(vectorize(|dxB13|)) = 29.5
y := cond1(A24) = 2716
mA24 := max(vectorize(|A24|)) = 108
mB24 := max(vectorize(|B24|)) = 1
resAl := m23/(mA24 + m23) = 0.294118
resAr := y*0.1/mA24 = 2.51481
resBl := m23/mA24 = 0.416667
resBr := y*mB11/mB24 = 81480
