y := [2.4; 0.7; -0.3; 2.4; 1.4]
t := [2.1; 2.4; 2.7; 3; 3.3]
A2 := [
    sum(t[i]^6, i = 0 .. 4), sum(t[i]^5, i = 0 .. 4), sum(t[i]^4, i = 0 .. 4), sum(t[i]^3, i = 0 .. 4);
    sum(t[i]^5, i = 0 .. 4), sum(t[i]^4, i = 0 .. 4), sum(t[i]^3, i = 0 .. 4), sum(t[i]^2, i = 0 .. 4);
    sum(t[i]^4, i = 0 .. 4), sum(t[i]^3, i = 0 .. 4), sum(t[i]^2, i = 0 .. 4), sum(t[i]^1, i = 0 .. 4);
    sum(t[i]^3, i = 0 .. 4), sum(t[i]^2, i = 0 .. 4), sum(t[i]^1, i = 0 .. 4), sum(t[i]^0, i = 0 .. 4)
] = [
    2684.76, 898.31, 305.362, 105.705;
    898.31, 305.362, 105.705, 37.35;
    305.362, 105.705, 37.35, 13.5;
    105.705, 37.35, 13.5, 5
]
B2 := [
    sum(t[i]^3*y[i], i = 0 .. 4);
    sum(t[i]^2*y[i], i = 0 .. 4);
    sum(t[i]^1*y[i], i = 0 .. 4);
    sum(t[i]^0*y[i], i = 0 .. 4)
] = [141.11; 49.275; 17.73; 6.6]
A := [
    sum(t[i]^4, i = 0 .. 4), sum(t[i]^3, i = 0 .. 4), sum(t[i]^2, i = 0 .. 4);
    sum(t[i]^3, i = 0 .. 4), sum(t[i]^2, i = 0 .. 4), sum(t[i]^1, i = 0 .. 4);
    sum(t[i]^2, i = 0 .. 4), sum(t[i]^1, i = 0 .. 4), sum(t[i]^0, i = 0 .. 4)
] = [305.362, 105.705, 37.35; 105.705, 37.35, 13.5; 37.35, 13.5, 5]
B := [sum(t[i]^2*y[i], i = 0 .. 4); sum(t[i]^1*y[i], i = 0 .. 4); sum(t[i]^0*y[i], i = 0 .. 4)] = [49.275; 17.73; 6.6]
Q := lsolve(A2, B2) = [-13.5802; 114.048; -314.802; 286.449]
q := lsolve(A, B) = [4.04762; -21.9571; 30.3686]
f2 := Q[0]*t^3 + Q[1]*t^2 + Q[2]*t^1 + Q[3] = [2.54857; 0.105714; 0.591429; 1.80571; 1.54857]
f := q[0]*t^2 + q[1]*t^1 + q[2] = [2.10857; 0.985714; 0.591429; 0.925714; 1.98857]
h := [y[0] - f[0]; y[1] - f[1]; y[2] - f[2]; y[3] - f[3]; y[4] - f[4]] = [0.291429; -0.285714; -0.891429; 1.47429; -0.588571]
h2 := [y[0] - f2[0]; y[1] - f2[1]; y[2] - f2[2]; y[3] - f2[3]; y[4] - f2[4]] = [-0.148571; 0.594286; -0.891429; 0.594286; -0.148571]
k := sum(h[i]^2, i = 0 .. 4) = 3.48114
E := max(vectorize(|h|)) = 1.47429
k2 := sum(h2[i]^2, i = 0 .. 4) = 1.54514
E2 := max(vectorize(|h2|)) = 0.891429
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B3 := [
    sum(t[i]^4*y[i], i = 0 .. 4);
    sum(t[i]^3*y[i], i = 0 .. 4);
    sum(t[i]^2*y[i], i = 0 .. 4);
    sum(t[i]^1*y[i], i = 0 .. 4);
    sum(t[i]^0*y[i], i = 0 .. 4)
] = [414.385; 141.11; 49.275; 17.73; 6.6]
A3 := [
    sum(t[i]^8, i = 0 .. 4), sum(t[i]^7, i = 0 .. 4), sum(t[i]^6, i = 0 .. 4), sum(t[i]^5, i = 0 .. 4), sum(t[i]^4, i = 0 .. 4);
    sum(t[i]^7, i = 0 .. 4), sum(t[i]^6, i = 0 .. 4), sum(t[i]^5, i = 0 .. 4), sum(t[i]^4, i = 0 .. 4), sum(t[i]^3, i = 0 .. 4);
    sum(t[i]^6, i = 0 .. 4), sum(t[i]^5, i = 0 .. 4), sum(t[i]^4, i = 0 .. 4), sum(t[i]^3, i = 0 .. 4), sum(t[i]^2, i = 0 .. 4);
    sum(t[i]^5, i = 0 .. 4), sum(t[i]^4, i = 0 .. 4), sum(t[i]^3, i = 0 .. 4), sum(t[i]^2, i = 0 .. 4), sum(t[i]^1, i = 0 .. 4);
    sum(t[i]^4, i = 0 .. 4), sum(t[i]^3, i = 0 .. 4), sum(t[i]^2, i = 0 .. 4), sum(t[i]^1, i = 0 .. 4), sum(t[i]^0, i = 0 .. 4)
] = [
    24928.4, 8133.64, 2684.76, 898.31, 305.362;
    8133.64, 2684.76, 898.31, 305.362, 105.705;
    2684.76, 898.31, 305.362, 105.705, 37.35;
    898.31, 305.362, 105.705, 37.35, 13.5;
    305.362, 105.705, 37.35, 13.5, 5
]
L := lsolve(A3, B3) = [-53.4979; 564.198; -2204.63; 3782.06; -2402.1]
f3 := L[0]*t^4 + L[1]*t^3 + L[2]*t^2 + L[3]*t^1 + L[4] = [2.4; 0.7; -0.3; 2.4; 1.4]
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h3 := [y[0] - f3[0]; y[1] - f3[1]; y[2] - f3[2]; y[3] - f3[3]; y[4] - f3[4]] = [-1.82954e-9; 3.53084e-9; -5.76438e-10; -2.21607e-9; 1.09267e-9]
k3 := sum(h3[i]^2, i = 0 .. 4) = 2.22512e-17
E3 := max(vectorize(|h3|)) = 3.53084e-9
m4 := 4
m3 := 3
k4 := m4 - 1 = 3
k3 := m3 - 1 = 2
a4 := 2/(k4 + 1) = 0.5
a3 := 2/(k3 + 1) = 0.666667
Y5 := a4*sum(y[3 - j]*(1 - a4)^j, j = 0 .. 3) = 1.3625
Y4 := a3*sum(y[2 - j]*(1 - a3)^j, j = 0 .. 2) = 0.133333
Ya5 := a4*sum(y[3 - j]*(1 - a4)*a4^j, j = 0 .. 3) = 0.68125
Ya4 := a3*sum(y[2 - j]*(1 - a3)*a3^j, j = 0 .. 2) = 0.274074
m5 := 5
k5 := m5 - 1 = 4
Ya6 := a5*sum(y[4 - j]*(1 - a5)*a5^j, j = 0 .. 4)  # error: This variable is undefined.
a5 := 2/(k5 + 1) = 0.4
Y6 := a5*sum(y[4 - j]*(1 - a5)^j, j = 0 .. 4) = 1.2777
ch2 := [y[0]; y[1]; Y4; Y5; Y6] = [2.4; 0.7; 0.133333; 1.3625; 1.2777]
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