ORIGIN ≡ 1
E := [0.2; 0.1; 0.1]
A := [0.2, -0.3, 0; 0, 0.3, 0; 0.6, -0.7, -0.2]
L := eigenvals(A) = [-0.2; 0.2; 0.3]
X := eigenvecs(A) = [0, 0.5547, -0.507093; 0, 0, 0.169031; 1, 0.83205, -0.845154]
z := [-0.507; 0.169; -0.845]
D(t, z) := [
    A[1, 1]*z[1] + A[1, 2]*z[2] + A[1, 3]*z[3];
    A[2, 1]*z[1] + A[2, 2]*z[2] + A[2, 3]*z[3];
    A[3, 1]*z[1] + A[3, 2]*z[2] + A[3, 3]*z[3]
]
n := 0, 1 .. 100
Y := rkfixed(z, 0, 10, 10, D)
Y2 := rkfixed(z, 0, 10, 100, D)
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Y = [
    0, -0.507, 0.169, -0.845;
    1, -0.684368, 0.228123, -1.14061;
    2, -0.923785, 0.307928, -1.53964;
    3, -1.24696, 0.415653, -2.07827;
    4, -1.68319, 0.561064, -2.80532;
    5, -2.27204, 0.757346, -3.78673;
    6, -3.06688, 1.02229, -5.11147;
    7, -4.13979, 1.37993, -6.89965;
    8, -5.58804, 1.86268, -9.31341;
    9, -7.54295, 2.51432, -12.5716;
    10, -10.1818, 3.39392, -16.9696
]
Y2 = [
    0, -0.507, 0.169, -0.845;
    0.1, -0.52244, 0.174147, -0.870734;
    0.2, -0.538351, 0.17945, -0.897252;
    0.3, -0.554746, 0.184915, -0.924577;
    0.4, -0.571641, 0.190547, -0.952735;
    0.5, -0.58905, 0.19635, -0.98175;
    0.6, -0.606989, 0.20233, -1.01165;
    0.7, -0.625475, 0.208492, -1.04246;
    0.8, -0.644523, 0.214841, -1.07421;
    0.9, -0.664152, 0.221384, -1.10692
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]
i := 1 .. 3
k := 0 .. 100
t := 0 .. 10
Z_01(k, i) := z[i]*e^(L[3]*k*0.1)
Z1(t, i) := z[i]*e^(L[3]*t)
Z_01(k, 1) = [
    -0.507; -0.52244; -0.538351; -0.554746; -0.571641; -0.58905; -0.606989; -0.625475; -0.644523; -0.664152
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]
Z_01(k, 2) = [
    0.169; 0.174147; 0.17945; 0.184915; 0.190547; 0.19635; 0.20233; 0.208492; 0.214841; 0.221384
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]
Z_01(k, 3) = [
    -0.845; -0.870734; -0.897252; -0.924577; -0.952735; -0.98175; -1.01165; -1.04246; -1.07421; -1.10692
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]
Z1(t, 1) = [-0.507; -0.684378; -0.923814; -1.24702; -1.6833; -2.27222; -3.06717; -4.14025; -5.58875; -7.54402; -10.1834]
Z1(t, 2) = [0.169; 0.228126; 0.307938; 0.415673; 0.5611; 0.757405; 1.02239; 1.38008; 1.86292; 2.51467; 3.39446]
Z1(t, 3) = [-0.845; -1.14063; -1.53969; -2.07836; -2.8055; -3.78703; -5.11195; -6.90041; -9.31458; -12.5734; -16.9723]
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i := 1 .. 3
j := 1 .. 10
n := 1 .. 100
ε1[i, j] := |Z1(j, i) - Y[j, i + 1]|
ε1_01[i, n] := |Z_01(n, i) - Y2[n, i + 1]|
max(ε1) = 4.40069
max(ε1_01) = 0.501607
ε1 = [
    0.177378, 0.239447, 0.323234, 0.43634, 0.589023, 0.795134, 1.07337, 1.44896, 1.95598, 2.64041;
    0.0591261, 0.0798155, 0.107745, 0.145447, 0.196341, 0.265045, 0.357789, 0.482987, 0.651993, 0.880138;
    0.295631, 0.399078, 0.538723, 0.727233, 0.981706, 1.32522, 1.78895, 2.41493, 3.25997, 4.40069
]
ε1_01 = [
    0.0154404, 0.0159107, 0.0163952, 0.0168945, 0.0174091, 0.0179392, 0.0184856, 0.0190485, 0.0196287, 0.0202264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;
    0.00514682, 0.00530356, 0.00546508, 0.00563151, 0.00580302, 0.00597975, 0.00616186, 0.00634951, 0.00654289, 0.00674215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;
    0.0257341, 0.0265178, 0.0273254, 0.0281576, 0.0290151, 0.0298987, 0.0308093, 0.0317476, 0.0327144, 0.0337107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]
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eps(t) := [0.2; 0.1; 0.1]
D_2(t, z) := D(t, z) + eps(t)
Y5 := rkfixed(z, 0, 10, 10, D_2)
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Y5 = [
    0, -0.507, 0.169, -0.845;
    1, -0.480705, 0.344735, -1.02938;
    2, -0.516301, 0.581949, -1.31268;
    3, -0.65118, 0.902149, -1.76623;
    4, -0.939298, 1.33437, -2.48913;
    5, -1.45774, 1.91779, -3.6196;
    6, -2.31578, 2.70532, -5.35042;
    7, -3.66722, 3.76835, -7.95005;
    8, -5.72747, 5.20328, -11.7914;
    9, -8.79676, 7.14019, -17.3913;
    10, -13.2919, 9.75471, -25.4637
]
Y6 := rkfixed(z, 0, 10, 100, D_2)
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Y6 = [
    0, -0.507, 0.169, -0.845;
    0.1, -0.502392, 0.184298, -0.860588;
    0.2, -0.498161, 0.200063, -0.87668;
    0.3, -0.494329, 0.216307, -0.893324;
    0.4, -0.49092, 0.233046, -0.910566;
    0.5, -0.487957, 0.250295, -0.928455;
    0.6, -0.485464, 0.268069, -0.947041;
    0.7, -0.483468, 0.286384, -0.966376;
    0.8, -0.481995, 0.305257, -0.986514;
    0.9, -0.481073, 0.324705, -1.00751
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]
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delta := [-0.05; 0.001; -0.002]
B(t) := [e^(delta[1]*t); e^(delta[2]*t); e^(delta[3]*t)]
D_3(t, z) := D_2(t, z) + delta  # error: This variable is undefined.
Y7 := rkfixed(z, 0, 10, 10, D_3)
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i := 1 .. 3
j := 1 .. 10
ε2[i, j] := |Y5[j, i + 1] - Y7[j, i + 1]|
max(ε1) = 4.40069
ε2 = [
    0, 0.0555274, 0.123798, 0.20779, 0.311196, 0.438602, 0.595708, 0.78961, 1.02916, 1.32541;
    0, 0.00116613, 0.0027402, 0.00486496, 0.00773302, 0.0116045, 0.0168302, 0.0238842, 0.0334059, 0.0462587;
    0, 0.0172586, 0.065911, 0.148307, 0.268292, 0.431404, 0.645168, 0.919483, 1.26714, 1.7045
]
